// SBML level 2 version 4

model purine_metabolism_spn()

  // Compartments:
  compartment compartment;  // 0-D

  // Species:
  substanceOnly species PRPP in compartment = 10;
  substanceOnly species IMP in compartment = 10;
  substanceOnly species Adenylsuccinate in compartment = 10;
  substanceOnly species AMP in compartment = 10;
  substanceOnly species XMP in compartment = 10;
  substanceOnly species Inosine in compartment = 10;
  substanceOnly species GMP in compartment = 10;
  substanceOnly species Hypoxanthine in compartment = 10;
  substanceOnly species Adenosine in compartment = 10;
  substanceOnly species Deoxyinosine in compartment = 10;
  substanceOnly species Xanthine in compartment = 10;
  substanceOnly species Urate in compartment = 10;
  substanceOnly species Adenine in compartment = 10;
  substanceOnly species Deoxyadenosine in compartment = 10;
  substanceOnly species dAMP in compartment = 10;
  substanceOnly species Guanosine in compartment = 10;
  substanceOnly species Guanine in compartment = 10;
  substanceOnly species Deoxyguanosine in compartment = 10;
  substanceOnly species dGMP in compartment = 10;

  // Reactions:
  _T_0_: PRPP => IMP; 1*PRPP;
  _T_1_: IMP => Adenylsuccinate; 1*IMP;
  _T_2_: Adenylsuccinate => AMP; 1*Adenylsuccinate;
  _T_3_: IMP => XMP; 1*IMP;
  _T_4_: IMP => Inosine; 1*IMP;
  _T_5_: XMP => GMP; 1*XMP;
  _T_6_: Adenosine => Inosine; 1*Adenosine;
  _T_7_: Adenosine => Adenine; 1*Adenosine;
  _T_8_: Deoxyadenosine => Deoxyinosine; 1*Deoxyadenosine;
  _T_9_: Deoxyinosine => Hypoxanthine; 1*Deoxyinosine;
  _T_10_: Hypoxanthine => Xanthine; 1*Hypoxanthine;
  _T_11_: Xanthine => Urate; 1*Xanthine;
  _T_12_: Deoxyguanosine => dGMP; 1*Deoxyguanosine;
  _T_13_: Guanine => Deoxyguanosine; 1*Guanine;
  _T_14_: Guanosine => Guanine; 1*Guanosine;
  _T_15_: Guanine => Xanthine; 1*Guanine;
  _T_16_: GMP => Guanosine; 1*GMP;
  _T_17_: Inosine => Hypoxanthine; 1*Inosine;
  _T_18_: Deoxyadenosine => dAMP; 1*Deoxyadenosine;
  _T_19_: Adenine => Deoxyadenosine; 1*Adenine;
  _T_20_: AMP => Adenosine; 1*AMP;

  // Unit definitions:
  unit substance = item;
end
