// SBML level 2 version 4

model Atorvastatin_Metabolism()
  // Bucher2011_Atorvastatin_Metabolism
  // This is the model of atorvastatin metabolism in hepaitc cells described in the article:
  // A systems biology approach to dynamic modeling and inter-subject variability of statin pharmacokinetics in human hepatocytes
  // Joachim Bucher , Stephan Riedmaier , Anke Schnabel , Katrin Marcus , Gabriele Vacun , Thomas S Weiss , Wolfgang E Thasler , Andreas K Nussler , Ulrich M Zanger and Matthias Reuss. BMC Systems Biology 2011, 5:66. DOI:10.1186/1752-0509-5-66
  // Abstract:
  // Background:
  // The individual character of pharmacokinetics is of great importance in the risk assessment of new drug leads in pharmacological research. Amongst others, it is severely influenced by the properties and inter-individual variability of the enzymes and transporters of the drug detoxification system of the liver. Predicting individual drug biotransformation capacity requires quantitative and detailed models.
  // Results:
  // In this contribution we present the de novo deterministic modeling of atorvastatin biotransformation based on comprehensive published knowledge on involved metabolic and transport pathways as well as physicochemical properties. The model was evaluated in primary human hepatocytes and parameter identifiability analysis was performed under multiple experimental constraints. Dynamic simulations of atorvastatin biotransformation considering the inter-individual variability of the two major involved enzymes CYP3A4 and UGT1A3 based on quantitative protein expression data in a large human liver bank (n=150) highlighted the variability in the individual biotransformation profiles and therefore also points to the individuality of pharmacokinetics.
  // Conclusions:
  // A dynamic model for the biotransformation of atorvastatin has been developed using quantitative metabolite measurements in primary human hepatocytes. The model comprises kinetics for transport processes and metabolic enzymes as well as population liver expression data allowing us to assess the impact of inter-individual variability of concentrations of key proteins. Application of computational tools for parameter sensitivity analysis enabled us to considerably improve the validity of the model and to create a consistent framework for precise computer-aided simulations in toxicology.
  // The model is parameterized for patient 1 and reproduces the time courses in figure 2 of the article.

  // Compartments:
  compartment cell = 1;  // GO:0005623
  compartment compartment = 1;

  // Species:
  substanceOnly species AS_m in cell = 87;  // isVersionOf CHEBI:39548 pubchem.compound:60823
  substanceOnly species ASL_m in cell = 31;  // isVersionOf pubchem.compound:6483036
  substanceOnly species ASoOH_m in cell = 10;  // hasVersion CHEBI:39548
  substanceOnly species ASLpOH_m in cell = 10;  // hasVersion pubchem.compound:6483036
  substanceOnly species ASpOH_m in cell = 10;  // hasVersion CHEBI:39548
  substanceOnly species ASLoOH_m in cell = 10;  // hasVersion pubchem.compound:6483036
  substanceOnly species AS_c in cell = 10;  // isVersionOf CHEBI:39548
  substanceOnly species ASL_c in cell = 10;  // isVersionOf pubchem.compound:6483036
  substanceOnly species ASpOH_c in cell = 10;  // hasVersion CHEBI:39548
  substanceOnly species ASoOH_c in cell = 10;  // hasVersion CHEBI:39548
  substanceOnly species ASLpOH_c in cell = 10;  // hasVersion pubchem.compound:6483036
  substanceOnly species ASLoOH_c in cell = 10;  // hasVersion pubchem.compound:6483036
  substanceOnly species ASpOH_b in cell = 10;  // hasVersion CHEBI:39548
  substanceOnly species ASoOH_b in cell = 10;  // hasVersion CHEBI:39548
  substanceOnly species ASLpOH_b in cell = 10;  // hasVersion pubchem.compound:6483036
  substanceOnly species ASLoOH_b in cell = 10;  // hasVersion pubchem.compound:6483036
  substanceOnly species AS_b in cell = 10;  // hasVersion CHEBI:39548
  substanceOnly species ASL_b in cell = 10;  // hasVersion pubchem.compound:6483036

  // Reactions:
  Import_AS: AS_m => AS_c; 1*AS_m;
  Import_ASL: ASL_m => ASL_c; 1*ASL_m;
  CYP3A4_ASpOH: AS_c => ASpOH_c; 1*AS_c;
  CYP3A4_ASoOH: AS_c => ASoOH_c; 1*AS_c;
  CYP3A4_ASLpOH: ASL_c => ASLpOH_c; 1*ASL_c;
  CYP3A4_ASLoOH: ASL_c => ASLoOH_c; 1*ASL_c;
  Export_ASoOH: ASoOH_c => ASoOH_m; 1*ASoOH_c;
  UGT1A3_AS: AS_c => ASL_c; 1*AS_c;
  R_ASASL_c: ASL_c => AS_c; 1*ASL_c;
  CR_oOH: ASLoOH_c => ASoOH_c; 1*ASLoOH_c;
  CR_pOH: ASLpOH_c => ASpOH_c; 1*ASLpOH_c;
  Export_AS: AS_c => AS_m; 1*AS_c;
  Export_ASL: ASL_c => ASL_m; 1*ASL_c;
  Import_ASLpOH: ASLpOH_m => ASLpOH_c; 1*ASLpOH_m;
  Import_ASLoOH: ASLoOH_m => ASLoOH_c; 1*ASLoOH_m;
  ASpOH_Prot: ASpOH_c => ASpOH_b; 1*ASpOH_c;
  ASoOH_Prot: ASoOH_c => ASoOH_b; 1*ASoOH_c;
  ASLpOH_Prot: ASLpOH_c => ASLpOH_b; 1*ASLpOH_c;
  ASLoOH_Prot: ASLoOH_c => ASLoOH_b; 1*ASLoOH_c;
  AS_Prot: AS_c => AS_b; 1*AS_c;
  ASL_Prot: ASL_c => ASL_b; 1*ASL_c;
  Import_ASpOH: ASpOH_m => ASpOH_c; 1*ASpOH_m;
  R_ASASL_m: ASL_m => AS_m; 1*ASL_m;
  R_pOH_m: ASLpOH_m => ASpOH_m; 1*ASLpOH_m;
  R_oOH_m: ASLoOH_m => ASoOH_m; 1*ASLoOH_m;
  Export_ASLpOH: ASLpOH_c => ASLpOH_m; 1*ASLpOH_c;
  Export_ASLoOH: ASLoOH_c => ASLoOH_m; 1*ASLoOH_c;
  Export_ASpOH: ASpOH_c => ASpOH_m; 1*ASpOH_c;
  Import_ASoOH: ASoOH_m => ASoOH_c; 1*ASoOH_m;

  // Unit definitions:
  unit substance = item;
end
