// SBML level 2 version 4

model syntetic_network_50_base()

  // Compartments:
  compartment compartment;  // 0-D

  // Species:
  substanceOnly species _P_0_ in compartment = 10;
  substanceOnly species _P_1_ in compartment = 10;
  substanceOnly species _P_2_ in compartment = 10;
  substanceOnly species _P_3_ in compartment = 10;
  substanceOnly species _P_4_ in compartment = 10;
  substanceOnly species _P_5_ in compartment = 10;
  substanceOnly species _P_6_ in compartment = 10;
  substanceOnly species _P_7_ in compartment = 10;
  substanceOnly species _P_8_ in compartment = 10;
  substanceOnly species _P_9_ in compartment = 10;
  substanceOnly species _P_10_ in compartment = 10;
  substanceOnly species _P_11_ in compartment = 10;
  substanceOnly species _P_12_ in compartment = 10;
  substanceOnly species _P_13_ in compartment = 10;
  substanceOnly species _P_14_ in compartment = 10;
  substanceOnly species _P_15_ in compartment = 10;
  substanceOnly species _P_16_ in compartment = 10;
  substanceOnly species _P_17_ in compartment = 10;
  substanceOnly species _P_18_ in compartment = 10;
  substanceOnly species _P_19_ in compartment = 10;
  substanceOnly species _P_20_ in compartment = 10;
  substanceOnly species _P_21_ in compartment = 10;
  substanceOnly species _P_22_ in compartment = 10;
  substanceOnly species _P_23_ in compartment = 10;
  substanceOnly species _P_24_ in compartment = 10;
  substanceOnly species _P_25_ in compartment = 10;
  substanceOnly species _P_26_ in compartment = 10;
  substanceOnly species _P_27_ in compartment = 10;
  substanceOnly species _P_28_ in compartment = 10;
  substanceOnly species _P_29_ in compartment = 10;
  substanceOnly species _P_30_ in compartment = 10;
  substanceOnly species _P_31_ in compartment = 10;
  substanceOnly species _P_32_ in compartment = 10;
  substanceOnly species _P_33_ in compartment = 10;
  substanceOnly species _P_34_ in compartment = 10;
  substanceOnly species _P_35_ in compartment = 10;
  substanceOnly species _P_36_ in compartment = 10;
  substanceOnly species _P_37_ in compartment = 10;
  substanceOnly species _P_38_ in compartment = 10;
  substanceOnly species _P_39_ in compartment = 10;
  substanceOnly species _P_40_ in compartment = 10;
  substanceOnly species _P_41_ in compartment = 10;
  substanceOnly species _P_42_ in compartment = 10;
  substanceOnly species _P_43_ in compartment = 10;
  substanceOnly species _P_44_ in compartment = 10;
  substanceOnly species _P_45_ in compartment = 10;
  substanceOnly species _P_46_ in compartment = 10;
  substanceOnly species _P_47_ in compartment = 10;
  substanceOnly species _P_48_ in compartment = 10;
  substanceOnly species _P_49_ in compartment = 10;
  substanceOnly species _P_50_ in compartment = 10;

  // Reactions:
  _T_0_: _P_0_ => _P_1_; 1*_P_0_;
  _T_1_: _P_40_ + _P_4_ => _P_5_; 1*_P_40_*_P_4_;
  _T_2_: _P_0_ => _P_40_; 1*_P_0_;
  _T_3_: _P_39_ + _P_5_ + _P_11_ => _P_2_; 1*_P_39_*_P_5_*_P_11_;
  _T_4_: _P_2_ => _P_12_ + _P_3_; 1*_P_2_;
  _T_5_: _P_11_ => _P_6_; 1*_P_11_;
  _T_6_: _P_42_ + _P_3_ => _P_13_ + _P_7_; 1*_P_42_*_P_3_;
  _T_7_: _P_12_ + _P_6_ => _P_14_; 1*_P_12_*_P_6_;
  _T_8_: _P_13_ + _P_43_ => _P_24_; 1*_P_13_*_P_43_;
  _T_9_: _P_24_ + _P_44_ + _P_7_ => _P_16_; 1*_P_24_*_P_44_*_P_7_;
  _T_10_: _P_23_ + _P_14_ => _P_22_ + _P_45_; 1*_P_23_*_P_14_;
  _T_11_: _P_41_ => _P_11_; 1*_P_41_;
  _T_12_: _P_38_ => _P_18_; 1*_P_38_;
  _T_13_: _P_4_ => _P_9_; 1*_P_4_;
  _T_14_: _P_9_ => _P_18_ + _P_37_; 1*_P_9_;
  _T_15_: _P_9_ + _P_35_ => _P_17_; 1*_P_9_*_P_35_;
  _T_16_: _P_35_ => _P_33_; 1*_P_35_;
  _T_17_: _P_17_ + _P_33_ => _P_32_; 1*_P_17_*_P_33_;
  _T_18_: _P_34_ => _P_30_; 1*_P_34_;
  _T_19_: _P_31_ + _P_30_ => _P_21_; 1*_P_31_*_P_30_;
  _T_20_: _P_21_ + _P_15_ + _P_48_ => _P_45_; 1*_P_21_*_P_15_*_P_48_;
  _T_21_: _P_29_ + _P_21_ => _P_46_; 1*_P_29_*_P_21_;
  _T_22_: _P_47_ => _P_27_; 1*_P_47_;
  _T_23_: _P_45_ => _P_28_; 1*_P_45_;
  _T_24_: _P_22_ + _P_16_ => _P_25_; 1*_P_22_*_P_16_;
  _T_25_: _P_28_ => _P_25_ + _P_26_; 1*_P_28_;
  _T_26_: _P_27_ => _P_26_; 1*_P_27_;
  _T_27_: _P_8_ => _P_9_; 1*_P_8_;
  _T_28_: _P_36_ => _P_33_; 1*_P_36_;
  _T_29_: _P_20_ => _P_15_; 1*_P_20_;
  _T_30_: _P_23_ + _P_6_ => _P_15_; 1*_P_23_*_P_6_;
  _T_31_: _P_16_ => _P_14_; 1*_P_16_;
  _T_32_: _P_33_ => _P_34_; 1*_P_33_;
  _T_33_: _P_36_ => _P_35_; 1*_P_36_;
  _T_34_: _P_8_ => _P_4_; 1*_P_8_;
  _T_35_: _P_1_ => _P_39_; 1*_P_1_;
  _T_36_: _P_46_ => _P_27_; 1*_P_46_;
  _T_37_: _P_12_ => _P_42_; 1*_P_12_;
  _T_38_: _P_18_ => _P_49_ + _P_10_; 1*_P_18_;
  _T_39_: _P_10_ => _P_20_; 1*_P_10_;
  _T_40_: _P_19_ + _P_49_ => _P_10_; 1*_P_19_*_P_49_;
  _T_41_: _P_19_ => _P_48_; 1*_P_19_;
  _T_42_: _P_32_ + _P_37_ => _P_19_; 1*_P_32_*_P_37_;
  _T_43_: _P_32_ => _P_31_; 1*_P_32_;
  _T_44_: _P_5_ => _P_11_; 1*_P_5_;
  _T_45_: _P_50_ => _P_40_; 1*_P_50_;

  // Unit definitions:
  unit substance = item;
end
